// COMSOL Multiphysics 6.2.0.339 model "basic_model.mph"
// Outline of the model tree

Parameters
  Voltage = 2

Geometry
  geom1 "Geometry 1" (2D, length unit m)
    r1: Rectangle | size = {1, 0.8}
    c1: Circle | pos = {0.5, 0.4}; r = 0.34
    pt1: Point | p = {0.5, 0.4}
    fin: Finalize "Form Union"

Materials
  mat1: Common "Material 1" on domains 1, 2
    def "Basic"
      electricconductivity = 100
      relpermittivity = 1
  mat2: Common "Material 2" on domains 2
    def "Basic"
      electricconductivity = 2
      relpermittivity = 1

Physics
  ec: ConductiveMedia "Electric Currents" on all domains
    dependent variable V
    cucn1: CurrentConservation (default)
    ein1: ElectricInsulation (default)
    init1: init "Initial Values 1" (default)
    term1: Terminal on boundaries 1 | TerminalType = Voltage; V0 = Voltage
    gnd1: Ground on boundaries 4

Mesh
  mesh1 "Mesh 1" (physics-controlled)
    size: MeshSizeDefault | hauto = 3

Studies
  std1 "Study 1"
    stat: Stationary

Solver configurations
  sol1 "Solution 1" (study std1)
    v1: Variables "Dependent Variables 1"
    s1: Stationary "Stationary Solver 1"
      dDef: Direct
      fc1: FullyCoupled | linsolver = dDef

Datasets
  dset1: Solution | solution = sol1

Plots
  pg1: PlotGroup2D "Electric Potential (ec)" | data = dset1
    surf1: Surface | expr = V
    str1: Streamline on boundaries 1-8 | expr = {ec.Ex, ec.Ey}; udist = 0.02
      col1: Color "Color Expression 1" | expr = V
      filt1: Filter | expr = !isScalingSystemDomain
  pg2: PlotGroup2D "Electric Field Norm (ec)" | data = dset1
    surf1: Surface | expr = ec.normE
    str1: Streamline on boundaries 1-8 | expr = {ec.Ex, ec.Ey}; udist = 0.02
      col1: Color "Color Expression 1" | expr = ec.normE
      filt1: Filter | expr = !isScalingSystemDomain

Exports
  img1: Image | size = current; unit = px; width = 800; height = 600
  data1: Data | data = dset1